// COMSOL Multiphysics 5.4.0.246 model "Ex_01_square.mph"
// Outline of the model tree

Parameters
  eta = 0.001  // [Pa s]
  rho = 1000  // [kg/m^3]
  delta_p = 1000  // [Pa]

Selections
  sel1: Explicit "Inlet" on boundaries 2
  sel2: Explicit "Outlet" on boundaries 5
  sel3: Explicit "Wall" on boundaries 1, 3, 4, 6

Couplings
  intop1: Integration on selection sel2

Probes
  bnd1: Boundary "Boundary Probe 1" on selection sel2
    type = integral
    expr = spf.U
    unit = m^3/s
    descr = Velocity magnitude
    frame = spatial
    table = tbl4
  pbnd1: BoundaryPoint "Boundary Point Probe 1" | dom = boundaries 5; coords = {50, 1000, 50}
    ppb1: PointExpr "Point Probe Expression 1" | expr = spf.U; unit = m/s; descr = Velocity magnitude; table = tbl4

Geometry
  geom1 "Geometry 1" (3D, length unit µm)
    blk1: Block "Square Channel" | size = {100, 1000, 100}
    fin: Finalize "Form Union"

Materials
  mat1: Common "H2O (water) [liquid]" on all domains
    def "Basic"
      thermalconductivity = k_liquid_2(T[1/K])[W/(m*K)]
      thermalexpansioncoefficient = (alpha_liquid_2(T[1/K])[1/K]+(Tempref-293[K])*if(abs(T-Tempref)>1e-3,(alpha_liquid_2(T[1/K])[1/K]-alpha_liquid_2(Tempref[1/K])[1/K])/(T-Tempref),d(alpha_liquid_2(T[1/K])[1/K],T)))/(1+alpha_liquid_2(Tempref[1/K])[1/K]*(Tempref-293[K]))
      heatcapacity = C_liquid_2(T[1/K])[J/(kg*K)]
      HC = HC_liquid_2(T[1/K])[J/(mol*K)]
      VP = VP_liquid_2(T[1/K])[Pa]
      density = rho_liquid_2(T[1/K])[kg/m^3]
      TD = TD_liquid_2(T[1/K])[m^2/s]
      dynamicviscosity = eta_liquid_1(T[1/K])[Pa*s]
      k_liquid_2: Piecewise | arg = T; pieces = {275.0, 370.0, -0.9003748+0.008387698*T^1-1.118205E-5*T^2}
      alpha_liquid_2: Piecewise "Piecewise 2a"
        arg = T
        pieces = 
          {273.0, 283.0, 0.01032507-7.62815E-5*T^1+1.412474E-7*T^2}
          {283.0, 373.0, -0.002464185+1.947611E-5*T^1-5.049672E-8*T^2+4.616995E-11*T^3}
      C_liquid_2: Piecewise "Piecewise 2b" | arg = T; pieces = {293.0, 373.0, 4035.841+0.492312*T^1}
      HC_liquid_2: Piecewise "Piecewise 2c" | arg = T; pieces = {293.0, 373.0, 72.64512+0.008861616*T^1}
      VP_liquid_2: Piecewise "Piecewise 2d" | arg = T; pieces = {280.0, 600.0, (exp((-2.005122e+03/T-5.565700e-01*log10(T)+9.898790e+00-1.111690e+07/T^3)*log(10.0)))*1.333200e+02}
      rho_liquid_2: Piecewise "Piecewise 2e"
        arg = T
        pieces = 
          {273.0, 283.0, 972.7584+0.2084*T^1-4.0E-4*T^2}
          {283.0, 373.0, 345.28+5.749816*T^1-0.0157244*T^2+1.264375E-5*T^3}
      TD_liquid_2: Piecewise "Piecewise 2f" | arg = T; pieces = {273.0, 333.0, 8.04E-8+2.0E-10*T^1}
      eta_liquid_1: Piecewise
        arg = T
        pieces = 
          {265.0, 293.0, 5.948859-0.08236196*T^1+4.287142E-4*T^2-9.938045E-7*T^3+8.65316E-10*T^4}
          {293.0, 353.0, 0.410191-0.004753985*T^1+2.079795E-5*T^2-4.061698E-8*T^3+2.983925E-11*T^4}
          {353.0, 423.0, 0.03625638-3.265463E-4*T^1+1.127139E-6*T^2-1.75363E-9*T^3+1.033976E-12*T^4}
    ThermalExpansion
      alphatan = CTE_liquid_2(T[1/K])[1/K]
      dL = (dL_liquid_2(T[1/K])-dL_liquid_2(Tempref[1/K]))/(1+dL_liquid_2(Tempref[1/K]))
      alphatanIso = CTE_liquid_2(T)
      dLIso = (dL_liquid_2(T)-dL_liquid_2(Tempref))/(1+dL_liquid_2(Tempref))
      dL_liquid_2: Piecewise
        arg = T
        pieces = 
          {273.0, 283.0, 0.008486158-6.947021E-5*T^1+1.333373E-7*T^2}
          {283.0, 373.0, 0.2324466-0.002030447*T^1+5.510259E-6*T^2-4.395999E-9*T^3}
      CTE_liquid_2: Piecewise "Piecewise 2a"
        arg = T
        pieces = 
          {273.0, 283.0, -6.947321E-5+2.666746E-7*T^1}
          {283.0, 293.0, -0.01363715+8.893977E-5*T^1-1.43925E-7*T^2}
          {293.0, 373.0, -0.00203045+1.102052E-5*T^1-1.3188E-8*T^2}
  mat2: Common "Material 2" on domains 1

Physics
  spf: LaminarFlow on all domains
    dependent variable u = {u, v, w}
    fp1: FluidProperties (default) | rho_mat = userdef; rho = rho; mu_mat = userdef; mu = eta
    init1: init "Initial Values 1" (default)
    wallbc1: WallBC "Wall 1" (default)
    out1: OutletBoundary "Outlet 1" on selection sel2
    bs1: BoundaryStress on selection sel1 | BoundaryCondition = NormalStressNormalFlow; f0 = delta_p

Mesh
  mesh1 "Mesh 1"
    size: MeshSizeDefault | hauto = 8
    size1: Size on entire geometry | hauto = 8
    bl1: BndLayer "Boundary Layers 1" on all domains
      blp: BndLayerProp "Boundary Layer Properties" on selection sel3 | blnlayers = 5; blstretch = 1.5

Studies
  std1 "Study 1"
    stat: Stationary

Solver configurations
  sol1 "Solution 1" (study std1)
    v1: Variables "Dependent Variables 1"
    s1: Stationary "Stationary Solver 1"
      fc1: FullyCoupled | linsolver = d1; initstep = 0.01; minstep = 1.0E-6; maxiter = 100
      d1: Direct | linsolver = pardiso; pivotperturb = 1.0E-13

Datasets
  dset1: Solution | solution = sol1
  surf1: Surface "Exterior Walls" on boundaries 1, 3, 4, 6 | data = dset1
  cpl1: CutPlane | data = dset1; genpoints = {{50, 500, 50}, {50, 499.423, 49.1831}, {50.9575, 500.236, 49.8335}}
  dset2: Solution "Probe Solution 2" | solution = sol1
  int1: Integral "Boundary Probe 1" on boundaries 5 | data = dset2
  cpt1: CutPoint3D "Boundary Point Probe 1" | data = dset2; pointx = 50.0; pointy = 1000.0; pointz = 50.0

Derived values
  int1: IntSurface "Flow rate" on boundaries 2 | data = dset1; table = evl3
  pev1: EvalPoint "Point Evaluation 1" | data = dset1; table = tbl3; expr = spf.U; descr = Velocity magnitude
  pev2: EvalPoint "Boundary Probe 1" | data = int1; table = tbl4; expr = spf.U
  pev3: EvalPoint "Point Probe Expression 1" | data = cpt1; table = tbl4; expr = spf.U
  gev1: EvalGlobal "Global Evaluation 1" | data = dset1; table = tbl7; expr = 1000[Pa]/intop1(spf.U); descr = R_hyd
  int2: IntSurface "Surface Integration 2" on selection sel2
    data = dset1
    table = tbl5
    expr = spf.U
    descr = Velocity magnitude

Tables
  tbl3: Table
    // Point Evaluation 1 (spf.U)
  tbl4: Table "Probe Table 4"
    Velocity magnitude (m^3/s), Boundary Probe 1 | Velocity magnitude (m/s), Point: (50, 1000, 50)
    3.47144e-09 | 0.718504
  tbl5: Table
    // Surface Integration 2 ()
    Velocity magnitude (m^3/s)
    3.47144e-09
  tbl7: Table
    // Global Evaluation 1 (1000[Pa]/intop1(spf.U))
    1000[Pa]/intop1(spf.U) (kg/(m^4*s))
    2.88065e+11

Plots
  pg1: PlotGroup3D "Velocity (spf)" | data = dset1
    slc1: Slice | expr = spf.U; quickplane = xy; shift = -4.6E-5
  pg2: PlotGroup3D "Pressure (spf)" | data = surf1
    surf1: Surface | expr = 1
    con1: Contour "Pressure" | expr = p
  pg3: PlotGroup1D "1D Plot Group 3" | data = none
    tblp1: Table "Table Graph 1" | table = tbl2
  pg4: PlotGroup1D "Probe Plot Group 4"
    tblp1: Table "Probe Table Graph 1" | table = tbl4; xaxisdata = auto; plotcolumns = {1, 2}